# [component: outputs data]
x := 0 .. 90
data =  # no stored result
f(x, y) :=
    sum ← 0
    for a ∈ 10*x .. 10*x + 9
        sum ← sum + data[:, y][a + x]
    sum
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sum(data[:, 0][x], x = 0 .. 899) = 767
sum(data[:, 1][x], x = 0 .. 899) = 799
sum(data[:, 2][x], x = 0 .. 899) = 799
sum(data[:, 3][x], x = 0 .. 899) = 578
